// COMSOL Multiphysics 5.6.0.280 model "1.-Fuerzas de Reacción y Esfuerzos Axiales en Estructuras 2D - COMSOL Ejercicio 2.mph"
// Outline of the model tree

Geometry
  geom1 "Geometry 1" (2D, length unit m)
    ls1: LineSegment | specify1 = coord; specify2 = coord; coord2 = {5, 7}
    ls2: LineSegment | specify1 = coord; specify2 = coord; coord2 = {5, 0}
    ls3: LineSegment | specify1 = coord; coord1 = {5, 0}; specify2 = coord; coord2 = {5, 7}
    ls4: LineSegment | specify1 = coord; coord1 = {5, 7}; specify2 = coord; coord2 = {10, 7}
    ls5: LineSegment | specify1 = coord; coord1 = {5, 0}; specify2 = coord; coord2 = {10, 0}
    ls6: LineSegment | specify1 = coord; coord1 = {5, 7}; specify2 = coord; coord2 = {10, 0}
    ls7: LineSegment | specify1 = coord; coord1 = {10, 7}; specify2 = coord; coord2 = {15, 0}
    ls8: LineSegment | specify1 = coord; coord1 = {10, 7}; specify2 = coord; coord2 = {10, 0}
    ls9: LineSegment | specify1 = coord; coord1 = {10, 0}; specify2 = coord; coord2 = {15, 0}
    fin: Finalize "Form Union"

Materials
  mat1: Common "Material 1" on all boundaries
    def "Basic"
      youngsmodulus = 210e9
      poissonsratio = 0.3
      density = 7850

Physics
  truss: Truss on all boundaries
    dependent variable u = {u, v, w}
    emm1: Elastic "Linear Elastic Material 1" (default)
    csd1: CrossSectionBeam "Cross Section Data 1" (default) | area = 0.005[m^2]
    sec1: StraightEdgeConstraint (default)
    free1: Free (default)
    init1: init "Initial Values 1" (default)
    pin1: Pinned on points 1, 6
    pl1: PointLoad on points 3 | Fp = {20e3, 0, 0}

Mesh
  mesh1 "Mesh 1" (physics-controlled)

Studies
  std1 "Study 1"
    stat: Stationary

Solver configurations
  sol1 "Solution 1" (study std1)
    v1: Variables "Dependent Variables 1"
    s1: Stationary "Stationary Solver 1"
      dDef: Direct
      fc1: FullyCoupled | linsolver = dDef

Datasets
  dset1: Solution | solution = sol1

Derived values
  pev1: EvalPoint "Point Evaluation 1" on points 6
    data = dset1
    table = tbl1
    expr = {truss.RFx, truss.RFy}
    unit = {N, N}
  av1: AvLine "Line Average 1" on boundaries 8 | data = dset1; table = tbl2; expr = truss.sn; unit = MPa

Tables
  tbl2: Table
    // Line Average 1 (truss.sn)
    Axial stress at center line (MPa)
    -0.888889

Plots
  pg1: PlotGroup2D "Fuerza" | data = dset1
    line1: Line
      expr = truss.Nxl
      unit = kN
      linetype = tube
      radiusexpr = sqrt(truss.area/pi)
      tuberadiusscale = 1.50397696478
      def1: Deform "Deformation" | expr = {u, v}
  pg2: PlotGroup2D "Esfuerzo Axial" | data = dset1
    line1: Line | expr = truss.sn; unit = MPa; linetype = tube; radiusexpr = sqrt(truss.area/pi)
      def1: Deform "Deformation" | expr = {u, v}
  pg3: PlotGroup2D "Desplazamiento" | data = dset1
    line1: Line | expr = truss.disp; unit = m; linetype = tube; radiusexpr = sqrt(truss.area/pi)
      def1: Deform "Deformation" | expr = {u, v}